// COMSOL Multiphysics 6.1.0.282 model "reynoldsopt.mph"
// Outline of the model tree

Parameters
  r1 = 1
  r2 = 0.5
  r3 = 0.5
  r4 = 1
  w1 = 2
  w2 = 1
  w3 = 1
  w4 = 2

Geometry
  geom1 "Geometry 1" (2D axisymmetric, length unit m)
    r1: Rectangle | size = {1, 4}
    cb1: CubicBezier "Cubic Bézier 1" | p = {{r1, r2, r3, r4}, {3, 2.5, 1.5, 1}}; w = {w1, w2, w3, w4}
    ls1: LineSegment | vertex1 = cb1(1) points 1; vertex2 = cb1(1) points 2
    csol1: ConvertToSolid | input = cb1, ls1
    dif1: Difference | input = r1; input2 = csol1
    fin: Finalize "Form Union"

Materials
  mat1: Common "Water" on all domains
    def "Basic"
      thermalexpansioncoefficient = alpha_p(T)
      bulkviscosity = muB(T)
      dynamicviscosity = eta(T)
      ratioofspecificheat = gamma_w(T)
      electricconductivity = 5.5e-6[S/m]
      heatcapacity = Cp(T)
      density = rho(T)
      thermalconductivity = k(T)
      soundspeed = cs(T)
      eta: Piecewise
        arg = T
        pieces = 
          {273.15, 413.15, 1.3799566804-0.021224019151*T^1+1.3604562827E-4*T^2-4.6454090319E-7*T^3+8.9042735735E-10*T^4-9.0790692686E-13*T^5+3.8457331488E-16*T^6}
          {413.15, 553.75, 0.00401235783-2.10746715E-5*T^1+3.85772275E-8*T^2-2.39730284E-11*T^3}
        argunit = K
        fununit = Pa*s
      Cp: Piecewise | arg = T; pieces = {273.15, 553.75, 12010.1471-80.4072879*T^1+0.309866854*T^2-5.38186884E-4*T^3+3.62536437E-7*T^4}; argunit = K; fununit = J/(kg*K)
      rho: Piecewise
        arg = T
        smooth = contd1
        pieces = 
          {273.15, 293.15, 6.3092789034e-05*T^3-0.0603676398829*T^2+18.9229382407066*T-950.704055329848}
          {293.15, 373.15, 1.0335053319e-05*T^3-0.0133950656345*T^2+4.96928883266*T+432.257114008512}
        argunit = K
        fununit = kg/m^3
      k: Piecewise | arg = T; pieces = {273.15, 553.75, -0.869083936+0.00894880345*T^1-1.58366345E-5*T^2+7.97543259E-9*T^3}; argunit = K; fununit = W/(m*K)
      cs: Interpolation | table = {{273, 1403}, {278, 1427}, {283, 1447}, {293, 1481}, {303, 1507}, {313, 1526}, {323, 1541}, {333, 1552}, {343, 1555}, {353, 1555}, {363, 1550}, {373, 1543}}; interp = piecewisecubic; fununit = m/s; argunit = K
      an1: Analytic | funcname = alpha_p; expr = -1/rho(T)*d(rho(T),T); args = T; fununit = 1/K; argunit = K
      an2: Analytic | funcname = gamma_w; expr = 1+(T/Cp(T))*(alpha_p(T)*cs(T))^2; args = T; fununit = 1; argunit = K
      an3: Analytic | funcname = muB; expr = 2.79*eta(T); args = T; fununit = Pa*s; argunit = K

Physics
  spf: LaminarFlow on all domains
    dependent variable u = {u, v, w}
    PhysicalModelProperty.StokesFlowProp = 0
    fp1: FluidProperties (default)
    init1: init "Initial Values 1" (default)
    axi1: AxialSymmetry (default)
    wallbc1: WallBC "Wall 1" (default)
    inl1: InletBoundary "Inlet 1" on boundaries 2 | BoundaryCondition = Pressure; U0in = 1; p0 = 2
    out1: OutletBoundary "Outlet 1" on boundaries 3

Mesh
  mesh1 "Mesh 1" (physics-controlled)
    size: MeshSizeDefault | table = cfd; hauto = 6

Studies
  std1 "Study 1"
    stat: Stationary

Solver configurations
  sol1 "Solution 1" (study std1)
    v1: Variables "Dependent Variables 1"
    s1: Stationary "Stationary Solver 1"
      fc1: FullyCoupled | linsolver = d1; initstep = 0.01; maxiter = 100
      d1: Direct "Direct, fluid flow variables (spf)" | linsolver = pardiso; pivotperturb = 1.0E-13

Datasets
  dset1: Solution | solution = sol1
  rev1: Revolve2D "Revolution 2D" | data = dset1; startangle = -90; revangle = 225

Derived values
  av1: AvVolume "Volume Average 1" | data = rev1; table = tbl1; expr = spf.cellRe

Tables
  tbl1: Table
    // Volume Average 1
    Cell Reynolds number (1) | Cell Reynolds number (1) | Cell Reynolds number (1)
    13471.4 | 1348.53 | 15792.9

Plots
  pg1: PlotGroup2D "Velocity (spf)" | data = dset1; dataisaxisym = on
    surf1: Surface | expr = spf.U
  pg2: PlotGroup2D "Pressure (spf)" | data = dset1; dataisaxisym = on
    con1: Contour | expr = p; levelrounding = off
  pg3: PlotGroup3D "Velocity, 3D (spf)" | data = rev1
    surf1: Surface | expr = spf.U