// COMSOL Multiphysics 6.1.0.282 model "reynoldsopt2.mph"
// Outline of the model tree

Geometry
  geom1 "Geometry 1" (2D, length unit mm)
    r1: Rectangle "Fork Body" | base = center; size = {3, 2}
    fil1: Fillet "Fork Body Fillet" | point = r1(1) points 1-4; radius = 0.5
    r2: Rectangle "Inlet Channel" | pos = {-2.3, 0}; base = center; size = {1.6, 1}
    ca1: CircularArc
      center = {-0.05, 0}
      r = 0.5
      point1 = {-0.05, 0.5}
      point2 = {-0.05, -0.5}
      angle1 = 90
      angle2 = -90
    ca2: CircularArc
      center = {-0.1, 0}
      r = 0.75
      point1 = {-0.1, 0.75}
      point2 = {-0.1, -0.75}
      angle1 = 90
      angle2 = -90
    ca3: CircularArc
      center = {0.25, 0.625}
      r = 0.125
      point1 = {0.25, 0.75}
      point2 = {0.25, 0.5}
      angle1 = 90
      angle2 = -90
      clockwise = on
    ca4: CircularArc
      center = {0.25, -0.625}
      r = 0.125
      point1 = {0.25, -0.5}
      point2 = {0.25, -0.75}
      angle1 = 90
      angle2 = -90
      clockwise = on
    qb1: QuadraticBezier "Quadratic Bézier 1" | p = {{-0.1, 0.075, 0.25}, {0.75, 0.85, 0.75}}
    qb2: QuadraticBezier "Quadratic Bézier 2" | p = {{-0.05, 0.15, 0.25}, {0.5, 0.4, 0.5}}; w = {1, 1, 1}
    qb3: QuadraticBezier "Quadratic Bézier 3" | p = {{-0.1, 0.075, 0.25}, {-0.75, -0.85, -0.75}}; w = {1, 1, 1}
    qb4: QuadraticBezier "Quadratic Bézier 4" | p = {{-0.05, 0.15, 0.25}, {-0.5, -0.4, -0.5}}; w = {1, 1, 1}
    csol1: ConvertToSolid | input = ca1, ca2, ca3, ca4, qb1, qb2, qb3, qb4
    c1: Circle "Center Inlet" | r = 0.3
    dif1: Difference | input = fil1; input2 = c1, csol1
    r3: Rectangle "Outlet Channel" | pos = {2.3, 0}; base = center; size = {1.6, 1}
    pare1: PartitionEdges | edge = r3(1) boundaries 2, 4; param = {0.25, 0.75}
    ls1: LineSegment | vertex1 = pare1(1) points 3; vertex2 = pare1(1) points 7
    ls2: LineSegment | vertex1 = pare1(1) points 2; vertex2 = pare1(1) points 6
    par1: Partition "Partition Objects 1" | input = pare1; tool = ls1, ls2
    fin: Finalize "Form Union"

Materials
  mat1: Common "Water" on all domains
    def "Basic"
      thermalexpansioncoefficient = alpha_p(T)
      bulkviscosity = muB(T)
      dynamicviscosity = eta(T)
      ratioofspecificheat = gamma_w(T)
      electricconductivity = 5.5e-6[S/m]
      heatcapacity = Cp(T)
      density = rho(T)
      thermalconductivity = k(T)
      soundspeed = cs(T)
      eta: Piecewise
        arg = T
        pieces = 
          {273.15, 413.15, 1.3799566804-0.021224019151*T^1+1.3604562827E-4*T^2-4.6454090319E-7*T^3+8.9042735735E-10*T^4-9.0790692686E-13*T^5+3.8457331488E-16*T^6}
          {413.15, 553.75, 0.00401235783-2.10746715E-5*T^1+3.85772275E-8*T^2-2.39730284E-11*T^3}
        argunit = K
        fununit = Pa*s
      Cp: Piecewise | arg = T; pieces = {273.15, 553.75, 12010.1471-80.4072879*T^1+0.309866854*T^2-5.38186884E-4*T^3+3.62536437E-7*T^4}; argunit = K; fununit = J/(kg*K)
      rho: Piecewise
        arg = T
        smooth = contd1
        pieces = 
          {273.15, 293.15, 6.3092789034e-05*T^3-0.0603676398829*T^2+18.9229382407066*T-950.704055329848}
          {293.15, 373.15, 1.0335053319e-05*T^3-0.0133950656345*T^2+4.96928883266*T+432.257114008512}
        argunit = K
        fununit = kg/m^3
      k: Piecewise | arg = T; pieces = {273.15, 553.75, -0.869083936+0.00894880345*T^1-1.58366345E-5*T^2+7.97543259E-9*T^3}; argunit = K; fununit = W/(m*K)
      cs: Interpolation | table = {{273, 1403}, {278, 1427}, {283, 1447}, {293, 1481}, {303, 1507}, {313, 1526}, {323, 1541}, {333, 1552}, {343, 1555}, {353, 1555}, {363, 1550}, {373, 1543}}; interp = piecewisecubic; fununit = m/s; argunit = K
      an1: Analytic | funcname = alpha_p; expr = -1/rho(T)*d(rho(T),T); args = T; fununit = 1/K; argunit = K
      an2: Analytic | funcname = gamma_w; expr = 1+(T/Cp(T))*(alpha_p(T)*cs(T))^2; args = T; fununit = 1; argunit = K
      an3: Analytic | funcname = muB; expr = 2.79*eta(T); args = T; fununit = Pa*s; argunit = K

Physics
  spf: LaminarFlow on all domains
    dependent variable u = {u, v, w}
    fp1: FluidProperties (default)
    init1: init "Initial Values 1" (default)
    wallbc1: WallBC "Wall 1" (default)
    inl1: InletBoundary "Inlet 1" on boundaries 1
      BoundaryCondition = MassFlow
      MassFlowType = StandardFlowRate
      stdmfr = 2e-7[m^3/s]
    out1: OutletBoundary "Outlet 1" on boundaries 14-16
    inl2: InletBoundary "Inlet 2" on boundaries 19, 20, 25, 26
      BoundaryCondition = MassFlow
      multipleInlets = 1
      ComponentWise = NormalInflowVelocity
      SuppressBackflow = 1
      FlowDirection = NormalFlow
      d_u = {1, 0, 0}
      PressureType = StaticPressure
      CompensateForHydrostaticPressureApproximation = 1
      CompensateForHydrostaticPressure = 1
      LaminarInflowOption = Uav
      CompensateForHydrostaticPressureApproximationIO = 1
      CompensateForHydrostaticPressureIO = 1
      Lentr = 1
      Dzentr = 1
      FullyDevelopedFlowOption = Uav
      CompensateForHydrostaticPressureApproximationfdf = 1
      CompensateForHydrostaticPressurefdf = 1
      Dzfdf = 1
      MassFlowType = StandardFlowRate
      mfr = 1e-5[kg/s]
      StandardFlowRateDefinedBy = StandardRho
      stdmfr = 2e-7[m^3/s]
      mnst = 0.0224136[m^3/mol]
      Pst = 1[atm]
      Tst = 273.15[K]
      sccmmfr = 100
      Dbnd = 1.0[m]
      Mn = 0.032[kg/mol]
      RANSVarOption = SpecifyTurbulentLengthScaleAndIntensity
      RANSAnisotropyOption = IsotropicTurbulence
      IT_list = lower_end_fully_turbulent
      LT_list = geometry_based
      IT = spf.IT_init
      LT = spf.LT_init
      Uref = 1[m/s]
      k0 = spf.k0_init
      ep0 = spf.ep0_init
      om0 = spf.om0_init
      nutilde0 = 3*spf.nu
      zeta0 = spf.zeta0_init
      zeta0_aniso = 2/3
      alpha0 = spf.alpha0_init
      gamma0 = spf.gamma0_init
      N = 100
      useRandomSeed = 1
      phys.randomSeed = 113013
      constraintType = unidirectionalConstraint
      constraintMethod = elemental
      xi0 = 1

Mesh
  mesh1 "Mesh 1" (physics-controlled)
    size: MeshSizeDefault | table = cfd; hauto = 6

Studies
  std1 "Study 1"
    stat: Stationary

Solver configurations
  sol1 "Solution 1" (study std1)
    v1: Variables "Dependent Variables 1"
    s1: Stationary "Stationary Solver 1"
      fc1: FullyCoupled | linsolver = d1; initstep = 0.01; maxiter = 100
      d1: Direct "Direct, fluid flow variables (spf)" | linsolver = pardiso; pivotperturb = 1.0E-13

Datasets
  dset1: Solution | solution = sol1

Derived values
  av1: AvLine "Line Average 1" on boundaries 10, 12 | data = dset1; table = tbl3; expr = spf.U

Tables
  tbl2: Table
    // Surface Average 1
    Cell Reynolds number (1) | Cell Reynolds number (1)
    9.38908e-06 | 9.39075e-06
  tbl3: Table
    // Line Average 1
    Velocity magnitude (m/s)
    6.44615e-07

Plots
  pg1: PlotGroup2D "Velocity (spf)" | data = dset1
    surf1: Surface | expr = spf.U
  pg2: PlotGroup2D "Pressure (spf)" | data = dset1
    con1: Contour | expr = p; levelrounding = off